// SBML level 3 version 1

model EnzymaticRxnModel1()
  // model units - substance: count, time: seconds, extent: mole

  // Compartments:
  compartment cell1 = 1 litre;

  // Species:
  species inp_DP1 in cell1 = 50/cell1;
  species X_DP1 in cell1 = 50/cell1;
  species C1_DP1 in cell1 = 0;
  species Xp_DP1 in cell1 = 0;
  species E_DP1 in cell1 = 50/cell1;
  species C2_DP1 in cell1 = 0;
  species C3_DP1 in cell1 = 0;
  species out_DP1 in cell1 = 0;
  species C4_DP1 in cell1 = 0;

  // Parameters:
  k1f1 = 1 per_second;
  k1r1 = 1 per_second;
  k2f1 = 1 per_second;
  k3f1 = 1 per_second;
  k3r1 = 1 per_second;
  k4f1 = 1 per_second;
  k5f1 = 1 per_second;
  k5r1 = 1 per_second;
  k6f1 = 1 per_second;
  k7f1 = 1 per_second;
  k7r1 = 1 per_second;
  k8f1 = 1 per_second;

  // Reactions:
  r11: inp_DP1 + X_DP1 -> C1_DP1; k1f1*inp_DP1*X_DP1 - k1r1*C1_DP1;
  r21: C1_DP1 => inp_DP1 + Xp_DP1; k2f1*C1_DP1;
  r31: E_DP1 + Xp_DP1 -> C2_DP1; k3f1*E_DP1*Xp_DP1 - k3r1*C2_DP1;
  r41: C2_DP1 => E_DP1 + X_DP1; k4f1*C2_DP1;
  r51: inp_DP1 + Xp_DP1 -> C3_DP1; k5f1*inp_DP1*Xp_DP1 - k5r1*C3_DP1;
  r61: C3_DP1 => out_DP1 + inp_DP1; k6f1*C3_DP1;
  r71: E_DP1 + out_DP1 -> C4_DP1; k7f1*E_DP1*out_DP1 - k7r1*C4_DP1;
  r81: C4_DP1 => Xp_DP1 + E_DP1; k8f1*C4_DP1;

  // Unit definitions:
  unit per_second = 1 / second;
end
